// COMSOL Multiphysics 5.5.0.292 model "Sincle-curve Micro Speaker.mph"
// Outline of the model tree

Parameters
  voltage = 4

Coordinate systems
  sys2: Mapping "Mapped System 2" | map = {z, -y, x}; orthonormal = on

Geometry
  geom1 "Geometry 1" (3D, length unit µm)
    wp1: WorkPlane "Work Plane 1 - Diaphragm - Si" | unite = on
      c3: Circle | type = curve; r = 895; angle = 89.6
      c4: Circle | type = curve; r = 735; angle = 89.6
      c5: Circle | type = curve; r = 900; angle = 12.5
      c6: Circle | rot = 77.1; type = curve; r = 730; angle = 12.5
      c7: Circle | rot = 77.1; type = curve; r = 735; angle = 12.5
      csol1: ConvertToSolid | input = c3, c4, c5, c6, c7
      c9: Circle | r = 730; angle = 89.6
      dif1: Difference | input = csol1; input2 = c9
      c11: Circle | r = 735; angle = 77.1
      dif2: Difference | input = dif1; input2 = c11
      rot1: Rotate | input = dif2; rot = range(0,90,360)
      c12: Circle | r = 730
      uni1: Union | input = c12, rot1(2), rot1(3), rot1(4), rot1(5)
      dif3: Difference (disabled) | input = , ; input2 = , 
      rot2: Rotate (disabled) | input = dif3; rot = range(0,90,360)
      uni2: Union | input = uni1
    ext1: Extrude | workplane = wp1; input = wp1; distance = 5
    wp2: WorkPlane "Work Plane 2 - Electrodes Au" | quickz = 6.2; unite = on
      c13: Circle | rot = 1; r = 765; angle = 43
      c14: Circle | rot = 1; r = 865; angle = 43
      c15: Circle | rot = 45.6; r = 765; angle = 43
      c16: Circle | rot = 45.6; r = 865; angle = 43
      dif4: Difference | input = c14; input2 = c13
      dif5: Difference | input = c16; input2 = c15
      rot3: Rotate | input = dif4; rot = range(0,90,360)
      rot4: Rotate | input = dif5; rot = range(0,90,360)
    ext2: Extrude | workplane = wp2; input = wp2; distance = 0.2; vertex = ext1(1) points 36
    wp3: WorkPlane "Work Plane 1 - Diaphragm 2 - PZT" | quickz = 5.2; unite = on
      c3: Circle | type = curve; r = 895; angle = 89.6
      c4: Circle | type = curve; r = 735; angle = 89.6
      c5: Circle | type = curve; r = 900; angle = 12.5
      c6: Circle | rot = 77.1; type = curve; r = 730; angle = 12.5
      c7: Circle | rot = 77.1; type = curve; r = 735; angle = 12.5
      csol1: ConvertToSolid | input = c3, c4, c5, c6, c7
      c9: Circle | r = 730; angle = 89.6
      dif1: Difference | input = csol1; input2 = c9
      c11: Circle | r = 735; angle = 77.1
      dif2: Difference | input = dif1; input2 = c11
      rot1: Rotate | input = dif2; rot = range(0,90,360)
      c12: Circle | r = 730
      uni1: Union | input = c12, rot1(2), rot1(3), rot1(4), rot1(5)
      dif3: Difference (disabled) | input = c14, c16; input2 = c13, c15
      rot2: Rotate (disabled) | input = dif3; rot = range(0,90,360)
      uni2: Union | input = uni1
    ext3: Extrude | workplane = wp3; input = wp3
    wp4: WorkPlane "Work Plane 1 - Diaphragm 2 - Pt" | quickz = 5; unite = on
      c3: Circle | type = curve; r = 895; angle = 89.6
      c4: Circle | type = curve; r = 735; angle = 89.6
      c5: Circle | type = curve; r = 900; angle = 12.5
      c6: Circle | rot = 77.1; type = curve; r = 730; angle = 12.5
      c7: Circle | rot = 77.1; type = curve; r = 735; angle = 12.5
      csol1: ConvertToSolid | input = c3, c4, c5, c6, c7
      c9: Circle | r = 730; angle = 89.6
      dif1: Difference | input = csol1; input2 = c9
      c11: Circle | r = 735; angle = 77.1
      dif2: Difference | input = dif1; input2 = c11
      rot1: Rotate | input = dif2; rot = range(0,90,360)
      c12: Circle | r = 730
      uni1: Union | input = c12, rot1(2), rot1(3), rot1(4), rot1(5)
      dif3: Difference (disabled) | input = c14, c16; input2 = c13, c15
      rot2: Rotate (disabled) | input = dif3; rot = range(0,90,360)
      uni2: Union | input = uni1
    ext4: Extrude | workplane = wp4; input = wp4; distance = 0.2
    pt1: Point (disabled)
    ls1: LineSegment (disabled) | vertex1 = ext1(1) points 61; vertex2 = ext1(1) points 35
    pt2: Point | p = {-1000, -1000, }
    pt3: Point | p = {1000, 1000, 0}
    ls2: LineSegment | vertex1 = pt2(1) points 1; vertex2 = pt3(1) points 1
    fin: Finalize "Form Union"

Materials
  mat1: Common "Si - Silicon (single-crystal, isotropic)" on domains 1, 4, 7, 10, 15, 18, 23, 26, 29, 32, 35, 38, 41, 46, 51, 54, 57
    def "Basic"
      thermalexpansioncoefficient = 2.6e-6[1/K]
      heatcapacity = 700[J/(kg*K)]
      relpermittivity = 11.7
      density = 2329[kg/m^3]
      thermalconductivity = 130[W/(m*K)]
    Enu "Young's modulus and Poisson's ratio"
      youngsmodulus = 170e9[Pa]
      poissonsratio = 0.28
    StressCharge "Stress-charge form"
      cE = {0, 0, 0, 0, 0, 0, 0, 0, 0, 0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}
      eES = {0, 0, 0, 0, 0, 0, 0, 0, 0, 0, 0, 0, 0, 0, 0, 0, 0, 0}
      epsilonrS = 4.5
      eta_cE = {0, 0, 0, 0, 0, 0, 0, 0, 0, 0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}
      eta_eES = {0, 0, 0, 0, 0, 0, 0, 0, 0, 0, 0, 0, 0, 0, 0, 0, 0, 0}
      eta_epsilonS = 0
  mat2: Common "Lead Zirconate Titanate (PZT-4)" (disabled) on domains 3, 6, 9, 12, 17, 20, 25, 28, 31, 34, 37, 40, 43, 48, 53, 56, 59
    def "Basic"
      relpermittivity = diag{762.5, 762.5, 663.2}
      density = 7500[kg/m^3]
    StrainCharge "Strain-charge form"
      sE = {1.23e-011[1/Pa], -4.05e-012[1/Pa], -5.31e-012[1/Pa], 0[1/Pa], 0[1/Pa], 0[1/Pa], -4.05e-012[1/Pa], 1.23e-011[1/Pa], -5.31e-012[1/Pa], 0[1/Pa], 0[1/Pa], 0[1/Pa], -5.31e-012[1/Pa], -5.31e-012[1/Pa], 1.55e-011[1/Pa], 0[1/Pa], 0[1/Pa], 0[1/Pa], 0[1/Pa], 0[1/Pa], 0[1/Pa], 3.9e-011[1/Pa], 0[1/Pa], 0[1/Pa], 0[1/Pa], 0[1/Pa], 0[1/Pa], 0[1/Pa], 3.9e-011[1/Pa], 0[1/Pa], 0[1/Pa], 0[1/Pa], 0[1/Pa], 0[1/Pa], 0[1/Pa], 3.27e-011[1/Pa]}
      dET = {0[C/N], 0[C/N], -1.23e-010[C/N], 0[C/N], 0[C/N], -1.23e-010[C/N], 0[C/N], 0[C/N], 2.89e-010[C/N], 0[C/N], 4.96e-010[C/N], 0[C/N], 4.96e-010[C/N], 0[C/N], 0[C/N], 0[C/N], 0[C/N], 0[C/N]}
      epsilonrT = diag{1475, 1475, 1300}
      eta_sE = {0, 0, 0, 0, 0, 0, 0, 0, 0, 0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}
      eta_dET = {0, 0, 0, 0, 0, 0, 0, 0, 0, 0, 0, 0, 0, 0, 0, 0, 0, 0}
      eta_epsilonT = 0
    StressCharge "Stress-charge form"
      cE = {1.38999e+011[Pa], 7.78366e+010[Pa], 7.42836e+010[Pa], 0[Pa], 0[Pa], 0[Pa], 7.78366e+010[Pa], 1.38999e+011[Pa], 7.42836e+010[Pa], 0[Pa], 0[Pa], 0[Pa], 7.42836e+010[Pa], 7.42836e+010[Pa], 1.15412e+011[Pa], 0[Pa], 0[Pa], 0[Pa], 0[Pa], 0[Pa], 0[Pa], 2.5641e+010[Pa], 0[Pa], 0[Pa], 0[Pa], 0[Pa], 0[Pa], 0[Pa], 2.5641e+010[Pa], 0[Pa], 0[Pa], 0[Pa], 0[Pa], 0[Pa], 0[Pa], 3.0581e+010[Pa]}
      eES = {0[C/m^2], 0[C/m^2], -5.20279[C/m^2], 0[C/m^2], 0[C/m^2], -5.20279[C/m^2], 0[C/m^2], 0[C/m^2], 15.0804[C/m^2], 0[C/m^2], 12.7179[C/m^2], 0[C/m^2], 12.7179[C/m^2], 0[C/m^2], 0[C/m^2], 0[C/m^2], 0[C/m^2], 0[C/m^2]}
      epsilonrS = diag{762.5, 762.5, 663.2}
      eta_cE = {0, 0, 0, 0, 0, 0, 0, 0, 0, 0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}
      eta_eES = {0, 0, 0, 0, 0, 0, 0, 0, 0, 0, 0, 0, 0, 0, 0, 0, 0, 0}
      eta_epsilonS = 0
  mat3: Common "Au - Gold" on domains 13, 14, 21, 22, 44, 45, 49, 50
    def "Basic"
      electricconductivity = 45.6e6[S/m]
      thermalexpansioncoefficient = 14.2e-6[1/K]
      heatcapacity = 129[J/(kg*K)]
      density = 19300[kg/m^3]
      thermalconductivity = 317[W/(m*K)]
      relpermittivity = 1e6
    Enu "Young's modulus and Poisson's ratio"
      youngsmodulus = 70e9[Pa]
      poissonsratio = 0.44
  mat4: Common "Pt - Platinum" on domains 2, 5, 8, 11, 16, 19, 24, 27, 30, 33, 36, 39, 42, 47, 52, 55, 58
    def "Basic"
      electricconductivity = 8.9e6[S/m]
      thermalexpansioncoefficient = 8.80e-6[1/K]
      heatcapacity = 133[J/(kg*K)]
      density = 21450[kg/m^3]
      thermalconductivity = 71.6[W/(m*K)]
      relpermittivity = 1e6
    Enu "Young's modulus and Poisson's ratio"
      youngsmodulus = 168e9[Pa]
      poissonsratio = 0.38
  mat5: Common "Lead Zirconate Titanate (PZT-7A)" on domains 3, 6, 9, 12, 17, 20, 25, 28, 31, 34, 37, 40, 43, 48, 53, 56, 59
    def "Basic"
      relpermittivity = diag{499.5, 499.5, 229.9}
      density = 7700[kg/m^3]
    StrainCharge "Strain-charge form"
      sE = {1.07e-011[1/Pa], -3.58e-012[1/Pa], -4.6e-012[1/Pa], 0[1/Pa], 0[1/Pa], 0[1/Pa], -3.58e-012[1/Pa], 1.07e-011[1/Pa], -4.6e-012[1/Pa], 0[1/Pa], 0[1/Pa], 0[1/Pa], -4.6e-012[1/Pa], -4.6e-012[1/Pa], 1.39e-011[1/Pa], 0[1/Pa], 0[1/Pa], 0[1/Pa], 0[1/Pa], 0[1/Pa], 0[1/Pa], 3.4e-011[1/Pa], 0[1/Pa], 0[1/Pa], 0[1/Pa], 0[1/Pa], 0[1/Pa], 0[1/Pa], 3.4e-011[1/Pa], 0[1/Pa], 0[1/Pa], 0[1/Pa], 0[1/Pa], 0[1/Pa], 0[1/Pa], 2.86e-011[1/Pa]}
      dET = {0[C/N], 0[C/N], -6e-011[C/N], 0[C/N], 0[C/N], -6e-011[C/N], 0[C/N], 0[C/N], 1.53e-010[C/N], 0[C/N], 3.6e-010[C/N], 0[C/N], 3.6e-010[C/N], 0[C/N], 0[C/N], 0[C/N], 0[C/N], 0[C/N]}
      epsilonrT = diag{930, 930, 425}
      eta_sE = {0, 0, 0, 0, 0, 0, 0, 0, 0, 0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}
      eta_dET = {0, 0, 0, 0, 0, 0, 0, 0, 0, 0, 0, 0, 0, 0, 0, 0, 0, 0}
      eta_epsilonT = 0
    StressCharge "Stress-charge form"
      cE = {1.57701e+011[Pa], 8.76735e+010[Pa], 8.12032e+010[Pa], 0[Pa], 0[Pa], 0[Pa], 8.76735e+010[Pa], 1.57701e+011[Pa], 8.12032e+010[Pa], 0[Pa], 0[Pa], 0[Pa], 8.12032e+010[Pa], 8.12032e+010[Pa], 1.25688e+011[Pa], 0[Pa], 0[Pa], 0[Pa], 0[Pa], 0[Pa], 0[Pa], 2.94118e+010[Pa], 0[Pa], 0[Pa], 0[Pa], 0[Pa], 0[Pa], 0[Pa], 2.94118e+010[Pa], 0[Pa], 0[Pa], 0[Pa], 0[Pa], 0[Pa], 0[Pa], 3.4965e+010[Pa]}
      eES = {0[C/m^2], 0[C/m^2], -2.2984[C/m^2], 0[C/m^2], 0[C/m^2], -2.2984[C/m^2], 0[C/m^2], 0[C/m^2], 9.48595[C/m^2], 0[C/m^2], 10.5882[C/m^2], 0[C/m^2], 10.5882[C/m^2], 0[C/m^2], 0[C/m^2], 0[C/m^2], 0[C/m^2], 0[C/m^2]}
      epsilonrS = diag{499.5, 499.5, 229.9}
      eta_cE = {0, 0, 0, 0, 0, 0, 0, 0, 0, 0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}
      eta_eES = {0, 0, 0, 0, 0, 0, 0, 0, 0, 0, 0, 0, 0, 0, 0, 0, 0, 0}
      eta_epsilonS = 0

Physics
  solid: SolidMechanics on all domains
    dependent variable u = {u, v, w}
    lemm1: LinearElasticModel "Linear Elastic Material 1" (default)
    free1: Free (default)
    init1: init "Initial Values 1" (default)
    pzm1: PiezoelectricMaterialModel "Piezoelectric Material 1" on domains 3, 6, 9, 12, 17, 20, 25, 28, 31, 34, 37, 40, 43, 48, 53, 56, 59
      coordinateSystem = GlobalSystem
    fix1: Fixed "Fixed Constraint 1" on boundaries 2, 5, 8, 108, 111, 114, 156, 159, 162, 310-312
    fix2: Fixed "Fixed Constraint 2" (disabled) on boundaries 90-92
  es: Electrostatics on all domains
    dependent variable V
    ccn1: ChargeConservation (default) | materialType = nonSolid
    zc1: ZeroCharge (default)
    init1: init "Initial Values 1" (default)
    ccnp1: ChargeConservationPiezo "Charge Conservation, Piezoelectric 1" on domains 3, 6, 9, 12, 17, 20, 25, 28, 31, 34, 37, 40, 43, 48, 53, 56, 59
    term1: DomainTerminal "Terminal 1" on domains 13, 22, 44, 50 | TerminalType = Voltage; V0 = voltage
    term2: DomainTerminal "Terminal 2" on domains 2, 5, 8, 11, 16, 19, 24, 27, 30, 33, 36, 39, 42, 47, 52, 55, 58
      TerminalType = Voltage
      V0 = 0
    term3: DomainTerminal "Terminal 3" on domains 14, 21, 45, 49 | TerminalType = Voltage; V0 = voltage

Multiphysics
  pze1: PiezoelectricEffect on all domains | Solid_physics = solid; Electrostatics_physics = es

Mesh
  mesh1 "Mesh 1"
    size: MeshSizeDefault | hmax = 200; hmin = 36; hcurve = 0.6; hnarrow = 0.5; hgrad = 1.5
    ftet1: FreeTet "Free Tetrahedral 1" on remaining entities | optcurved = on

Studies
  std1 "Study 1"
    param: Parametric "Parametric Sweep" (disabled) | pname = voltage; plistarr = range(0,0.2,10)
    stat: Stationary

Solver configurations
  sol1 "Solution 1" (study std1)
    v1: Variables "Dependent Variables 1"
    s1: Stationary "Stationary Solver 1"
      fc1: FullyCoupled | linsolver = d1
      d1: Direct

Datasets
  dset1: Solution | solution = sol1
  cln1: CutLine3D | data = dset1; genpoints = {{8.70128, 894.869, 2.27374E-13}, {0, 0, 6.4}}
  cln2: CutLine3D | data = dset1; genpoints = {{628.923, 632.2, 6.2}, {-634.222, -631.11, 6.2}}

Plots
  pg1: PlotGroup3D "Stress (solid)" | data = dset1
    surf1: Surface | expr = solid.mises
      def: Deform "Deformation" | expr = {u, v, w}; descr = Displacement field
  pg2: PlotGroup3D "Electric Potential (es)" | data = dset1
    mslc1: Multislice | expr = V
  pg4: PlotGroup1D "1D Plot Group 4" | data = dset1
    lngr1: LineGraph | data = cln2; inputmode = linesecond; expr = solid.disp